folder simulations: version=37; creator=Apsim 7.9-r4044
  PlugIns
    PlugIn=[%apsim%\UserInterface\ApsimUIPlugIn.xml, %apsim%\UserInterface\SoilTypes.xml, %apsim%\UserInterface\Graph.xml, %apsim%\UserInterface\Ausfarm.xml, %apsim%\UserInterface\DevelopersPlugIn.xml, %apsim%\Model\Accum.xml, %apsim%\Model\AgPasture.xml, %apsim%\Model\Bambatsi.xml, %apsim%\Model\Barley.xml, %apsim%\Model\Br.xml, %apsim%\Model\Bore.xml, %apsim%\Model\Broccoli.xml, %apsim%\Model\ButterflyPea.xml, %apsim%\Model\Canola.xml, %apsim%\Model\Canopy.xml, %apsim%\Model\Centro.xml, %apsim%\Model\Channel.xml, %apsim%\Model\Chickpea.xml, %apsim%\Model\Cl.xml, %apsim%\Model\Climatechange.xml, %apsim%\Model\Clock.xml, %apsim%\Model\Cowpea.xml, %apsim%\Model\CropUI.xml, %apsim%\Model\Dam.xml, %apsim%\Model\DCD.xml, %apsim%\Model\EGrandis.xml, %apsim%\Model\EMelliodora.xml, %apsim%\Model\Eo.xml, %apsim%\Model\EPopulnea.xml, %apsim%\Model\Erosion.xml, %apsim%\Model\Events.xml, %apsim%\Model\Fababean.xml, %apsim%\Model\Factorial.xml, %apsim%\Model\Factor.xml, %apsim%\Model\FactorComplex.xml, %apsim%\Model\FrenchBean.xml, %apsim%\Model\Fertiliser.xml, %apsim%\Model\Fieldpea.xml, %apsim%\Model\Gcm_data.xml, %apsim%\Model\Grasp.xml, %apsim%\Model\Graz.xml, %apsim%\Model\Growth.xml, %apsim%\Model\Horsegram.xml, %apsim%\Model\Ini.xml, %apsim%\Model\InitWater.xml, %apsim%\Model\Input.xml, %apsim%\Model\Irrigation.xml, %apsim%\Model\KWTest.xml, %apsim%\Model\Lablab.xml, %apsim%\Model\Lettuce.xml, %apsim%\Model\Log.xml, %apsim%\Model\Lucerne.xml, %apsim%\Model\Lupin.xml, %apsim%\Model\Maize.xml, %apsim%\Model\MaizeZ.xml, %apsim%\Model\Manager.xml, %apsim%\Model\Map.xml, %apsim%\Model\Memo.xml, %apsim%\Model\MetFile.xml, %apsim%\Model\MicroMet.xml, %apsim%\Model\Millet.xml, %apsim%\Model\Millet1.xml, %apsim%\Model\Millet2.xml, %apsim%\Model\Millet3.xml, %apsim%\Model\Millet4.xml, %apsim%\Model\Millet5.xml, %apsim%\Model\Mucuna.xml, %apsim%\Model\Mungbean.xml, %apsim%\Model\Navybean.xml, %apsim%\Model\Oats.xml, %apsim%\Model\Ocean_data.xml, %apsim%\Model\Operations.xml, %apsim%\Model\Orobanche.xml, %apsim%\Model\Oryza.xml, %apsim%\Model\Oryza2.xml, %apsim%\Model\OutputFile.xml, %apsim%\Model\Ozcot.xml, %apsim%\Model\Patchinput.xml, %apsim%\Model\Peanut.xml, %apsim%\Model\Pigeonpea.xml, %apsim%\Model\Pond.xml, %apsim%\Model\Potato.xml, %apsim%\Model\RotPlot.xml, %apsim%\Model\RugPlotUI.xml, %apsim%\Model\Root.xml, %apsim%\Model\Rule.xml, %apsim%\Model\Script.xml, %apsim%\Model\Seedling.xml, %apsim%\Model\SiloInput.xml, %apsim%\Model\Slurp.xml, %apsim%\Model\Soi.xml, %apsim%\Model\Soil.xml, %apsim%\Model\SoilNui.xml, %apsim%\Model\SoilTemp.xml, %apsim%\Model\Sorghum.xml, %apsim%\Model\SorghumConstants.xml, %apsim%\Model\SorghumGenotype.xml, %apsim%\Model\Soybean.xml, %apsim%\Model\Stylo.xml, %apsim%\Model\Sugar.xml, %apsim%\Model\Summaryfile.xml, %apsim%\Model\Sunflower.xml, %apsim%\Model\SurfaceOM.xml, %apsim%\Model\SweetCorn.xml, %apsim%\Model\SweetSorghum.xml, %apsim%\Model\SWIM2.xml, %apsim%\Model\SWIM2ui.xml, %apsim%\Model\Sysbal.xml, %apsim%\Model\SysBal2.xml, %apsim%\Model\Tcllink.xml, %apsim%\Model\Tclmanager.xml, %apsim%\Model\Tclui.xml, %apsim%\Model\Tracker.xml, %apsim%\Model\Tree.xml, %apsim%\Model\Variables.xml, %apsim%\Model\Venlink.xml, %apsim%\Model\vine.xml, %apsim%\Model\WaterSupply.xml, %apsim%\Model\Weed.xml, %apsim%\Model\Wheat.xml, %apsim%\Model\YPCalc.xml, Soil_V79.xml, Sugar_V79.xml, SurfaceOM_V79.xml]
  simulation T1-BD_hiC
    metfile met: filename=bingalbay.met
    clock
      start_date = 01/10/2013  # Enter the start date of the simulation
      end_date = 30/11/2016  # Enter the end date of the simulation
    summaryfile
    area paddock
      Soil BulgR: SoilType=Hydrosol; Site=Silkwood; NearestTown=Silkwood; Region=South Johnstone sub-basin; State=Queensland; Country=Australia; Latitude=-17.745756; Longitude=146.049656; YearOfSampling=0
        Comments=Based on work conducted in the Climate Forecasting project as of 20180124
        Water
          Thickness  BD    AirDry  LL15  DUL   SAT    KS
          100        1.37  0.05    0.26  0.34  0.459  200
          100        1.32  0.05    0.27  0.34  0.477  200
          100        1.23  0.05    0.28  0.36  0.51   200
          150        1.26  0.05    0.27  0.37  0.5    250
          150        1.19  0.05    0.29  0.4   0.53   200
          300        1.12  0.05    0.31  0.43  0.55   150
          300        1.14  0.05    0.3   0.42  0.54   200
          300        1.14  0.05    0.3   0.42  0.54   100
          SoilCrop sugar: LL=[0.26, 0.27, 0.28, 0.27, 0.29, 0.31, 0.3, 0.3]; KL=[0.1, 0.1, 0.1, 0.08, 0.08, 0.06, 0.04, 0.01]; XF=[1, 1, 1, 1, 1, 0, 0, 0]
        SoilWater: SummerCona=3.5; SummerU=4; SummerDate=1-Nov; WinterCona=3.5; WinterU=4; WinterDate=1-Apr; DiffusConst=88; DiffusSlope=35.4; Salb=0.1; CN2Bare=73; CNRed=20; CNCov=0.8; Thickness=[100, 100, 100, 150, 150, 300, 300, 300]; SWCON=[0.4, 0.4, 0.4, 0.4, 0.4, 0.4, 0.4, 0.01]
        SoilOrganicMatter: RootCN=70; RootWt=3353; SoilCN=15; EnrACoeff=7.4; EnrBCoeff=0.2; OCUnits=Total
          Thickness  OC     FBiom  FInert
          100        5.7    0.111  0.241
          100        0.721  0.047  0.38
          100        0.966  0.054  0.596
          150        0.578  0.064  0.824
          150        0.518  0.096  0.938
          300        0.517  0.094  0.99
          300        0.477  0.091  0.99
          300        0.453  0.088  0.99
        Analysis: Thickness=[100, 100, 100, 150, 150, 300, 300, 300]; PH=[4.9, 5, 5, 4.9, 5, 5, 5.1, 4.9]; PHUnits=Water; BoronUnits=HotWater
        InitialWater: FractionFull=0.75; PercentMethod=EvenlyDistributed; RelativeTo=ll15
        Sample Initial nitrogen: NO3Units=kgha; NH4Units=kgha; SWUnits=Volumetric; OCUnits=Total; PHUnits=Water
          Thickness  NO3    NH4    SW
          100        6.167  6.167  0.348
          100        6.167  6.167  0.367
          100        6.167  6.167  0.39
          150        0      0      0.374
          150        0      0      0.386
          300        0      0      0.406
          300        0      0      0.391
          300        0      0      0.406
      erosion
        model = freebairn  # Model Name
        slope = 0.2  # Slope of plot in percent (%)
        slope_length = 100  # Length of plot (m)
        k_factor = 0.38  # Soil erodibility factor (t/ha/EI 30 )
        p_factor = 1.0  # Supporting practise factor (unitless)
        bed_depth = 1900  # Depth to bedrock (mm)
        profile_reduction = off
        profile_layer_merge = 0.05  # Fraction of original size in which the lowest layer is merged into the layer above (0-1)
        minimum_depth = 100.0  # If the profile erodes to this depth, the simulation is stopped (mm)
      surfaceom SurfaceOrganicMatter
        PoolName = soybean  # Organic Matter pool name
        type = soybean  # Organic Matter type
        mass = 0  # Initial surface residue (kg/ha)
        cnr = 40.0  # C:N ratio of initial residue
        standing_fraction = 0.0  # Fraction of residue standing
      fertiliser
      sugar
      folder Manager folder
        operations Operations Schedule
          21/06/2014  !'SurfaceOrganicMatter' tillage f_incorp = 0.8 (0-1), tillage_depth = 200. (mm) !Bianca commented out
          21/07/2014  'BulgR Nitrogen' reset
          21/07/2014  'BulgR Water' reset
          21/07/2014  !'BulgR Nitrogen' set no3 = 25 25 25 0 0 0
          21/07/2014  sugar sow plants = 10 (), cultivar = 'q117', sowing_depth = 150 (mm), row_spacing = 1000 (mm) !Bianca added row spacing
          21/07/2014  fertiliser apply amount = 29.5 (kg/ha), depth = 150 (mm), type = 'nh4_n' () !Bianca reduced N fert
          22/10/2014  fertiliser apply amount = 164.5 (kg/ha), depth = 50 (mm), type = 'urea_n' () !Bianca reduced N depth and increased N
          08/03/2015  !sugar lodge
          11/11/2015  sugar harvest
          25/11/2015  fertiliser apply amount = 190 (kg/ha), depth = 50 (mm), type = 'urea_n' ()
          25/11/2016  sugar harvest !Bianca changed harvest date
        manager wet based lodging (disabled)
          on start_of_day:
```
if sugar.DaysAfterSowing = 1 then
      Lodgeflag=0 
endif

! workout severity of rain storm for lodging
if (rain=0) and (storm=1) then
  drydays=drydays+1
endif

!if (drydays>5) then 
!  report do_output
  storm=0  
  drydays=0
  stormrain=0.0
endif

if (rain>20) then
  storm=1
  drydays=0
endif

if (storm=1) then
  stormrain=stormrain+rain
endif

if (storm=0) then
  fasw35 = (sugar.esw(1)+ sugar.esw(2)+sugar.esw(3)) / (dul_dep(1)+dul_dep(2)+dul_dep(3)-ll15_dep(1)-ll15_dep(2)-ll15_dep(3))
  !fasw25 = (sugar.esw(1)+ sugar.esw(2)) / (dul_dep(1)+dul_dep(2)-ll15_dep(1)-ll15_dep(2))
  !fasw40 = (sw(1)+sw(2)-ll(1)-ll(2))/(dul(1)+dul(2)-ll(1)-ll(2))
endif

if (stormrain > 300) and (LodgeFlag = 0) then
         sugar lodge
         chk_lodge = chk_lodge + 1
         LodgeAge = sugar.DaysAfterSowing
         LodgeDate = dd_mmm_yyyy
         LodgeFlag = 1
endif
```
        manager Lodging (disabled)
          on init:
```
LodgeFlag = 0
```
          on start_of_day:
```
if rain > 100 and sugar.cane_wt > 1500 and LodgeFlag = 0 then
   sugar lodge
   LodgeFlag = 1
endif

if sugar.DaysAfterSowing = 1 then
   LodgeFlag = 0
endif
```
        manager NinRunoff
          on init:
```
enr_a = 7.4
enr_b = 0.2
```
          on end_of_day:
```
!!!!!!!!!! This N Erosion section written by Jody Biggs !!!!!!!!!!!!!!!!!!!!!!
!
!calculations for nitrate lost through runoff using the erosion module
conc_mgkg = (no3(1) / (1000 * bd(1) * dlayer(1) * 10)) *1000000
!
! calculate enrichment ratio

!enr_b  = 0.2

! calculating ratio based on enrichment coefficients
if erosion.soil_loss > 0 then
   enrJB = enr_a * ((1000.0 * soil_loss) ^ (-1.0*enr_b))
   NRunoff = (soil_loss * enrJB * conc_mgkg)/1000
   if NRunoff > no3(1) then
      NRunoff = no3(1)
      no3(1) = 0
   else
      no3(1) = no3(1) - NRunoff
   endif
else
   enrJB = 1
   NRunoff = 0
endif
```
      outputfile harvest: filename=T1-BD_hiC harvest.out; title=T1-BD_hiC harvest
        variables
          variables: dd/mm/yyyy as Date, biomass, cane_wt, ratoon_no, crop_status, sw_demand, esw, lai, nfact_photo, root_depth, fertiliser, tracker.sumDrain, tracker.sumRain, tracker.sumRunoff, tracker.sumEP, tracker.sumES, tracker.sumDenit, tracker.sumNinDD, biomass_n, no3(), nh4(), tracker.avgNstress, tracker.avgWaterstress, tracker.avgOXDEFstress, nit_tot(), sumNinRO, n_green(1) as root_N, n_green(2) as leaf_N, n_green(3) as stem_N, n_green(4) as cabb_N, n_green(5) as sucr_N, canefw
        events Reporting Frequency
          events: sowing, harvesting
      outputfile daily: filename=T1-BD_hiC daily.out; title=T1-BD_hiC daily
        variables
          variables: dd/mm/yyyy as Date, biomass, cane_wt, ratoon_no, crop_status, sw_demand, esw, lai, nfact_photo, root_depth, fertiliser, surfaceom_wt, no3(), nh4(), hum_n(), fom_n(), biom_n(), ep, es, dnit(), leach_no3, rain, sat_dep(), dul_dep(), ll15_dep(), sw_dep(), no3(1) as no3_0_20, no3(3) as no3_40_60, no3(5) as no3_80_100, nh4(1) as nh4_0_20, nh4(3) as nh4_40_60, nh4(5) as nh4_80_100, water_table, lodge_redn_photo, oxdef_photo, nit_tot(), swdef_photo
        events Reporting Frequency: event=post
      outputfile layered: filename=T1-BD_hiC layered.out; title=T1-BD_hiC layered
        variables
          variables: dd/mm/yyyy as Date, sw, no3, nh4, dul, ll15, sat
        events Reporting Frequency: event=post
      tracker
        variable:
          sum of drain on end_of_day from harvest.reported to now as sumDrain
          sum of rain on end_of_day from harvest.reported to now as sumRain
          sum of runoff on end_of_day from harvest.reported to now as sumRunoff
          sum of sugar.ep on end_of_day from harvest.reported to now as sumEP
          sum of es on end_of_day from harvest.reported to now as sumES
          sum of dnit() on end_of_day from harvest.reported to now as sumDenit
          sum of leach_no3 on end_of_day from harvest.reported to now as sumNinDD
          average of nfact_photo on end_of_day from harvest.reported to now as avgNstress
          average of swdef_photo on end_of_day from harvest.reported to now as avgWaterstress
          average of oxdef_photo on end_of_day from harvest.reported to now as avgOXDEFstress
          sum of Nrunoff on end_of_day from harvest.reported to now as sumNinRO
  simulation T2-BD_hiC -> /simulations/T1-BD_hiC
    area paddock -> /simulations/T1-BD_hiC/paddock
      Soil BulgR -> /simulations/T1-BD_hiC/paddock/BulgR
        Sample Initial nitrogen: NO3Units=kgha; NH4Units=kgha; SWUnits=Volumetric; OCUnits=Total; PHUnits=Water
          Thickness  NO3  NH4  SW
          100        5.5  5.5  0.348
          100        5.5  5.5  0.367
          100        5.5  5.5  0.39
          150        0    0    0.374
          150        0    0    0.386
          300        0    0    0.406
          300        0    0    0.391
          300        0    0    0.406
      folder Manager folder -> /simulations/T1-BD_hiC/paddock/Manager folder
        operations Operations Schedule
          21/6/2014  !'SurfaceOrganicMatter' tillage f_incorp = 0.8 (0-1), tillage_depth = 200. (mm) !Bianca commented out
          21/07/2014  'BulgR Nitrogen' reset
          21/07/2014  'BulgR Water' reset
          21/07/2014  !'BulgR Nitrogen' set no3 = 25 25 25 0 0 0
          21/07/2014  sugar sow plants = 10 (), cultivar = 'q117', sowing_depth = 150 (mm), row_spacing = 1000 (mm) !Bianca added row spacing
          21/07/2014  fertiliser apply amount = 29.5 (kg/ha), depth = 150 (mm), type = 'nh4_n' () !Bianca reduced N fert
          22/10/2014  fertiliser apply amount = 104.5 (kg/ha), depth = 50 (mm), type = 'urea_n' () !Bianca reduced N depth and increased N
          11/11/2015  sugar harvest
          25/11/2015  fertiliser apply amount = 158 (kg/ha), depth = 50 (mm), type = 'urea_n' ()
          25/11/2016  sugar harvest !Bianca changed date
      outputfile harvest -> /simulations/T1-BD_hiC/paddock/harvest: filename=T2-BD_hiC harvest.out; title=T2-BD_hiC harvest
        variables -> /simulations/T1-BD_hiC/paddock/harvest/Variables
        events Reporting Frequency -> /simulations/T1-BD_hiC/paddock/harvest/Reporting Frequency
      outputfile daily -> /simulations/T1-BD_hiC/paddock/daily: filename=T2-BD_hiC daily.out; title=T2-BD_hiC daily
        variables -> /simulations/T1-BD_hiC/paddock/daily/Variables
        events Reporting Frequency -> /simulations/T1-BD_hiC/paddock/daily/Reporting Frequency
      outputfile layered -> /simulations/T1-BD_hiC/paddock/layered: filename=T2-BD_hiC layered.out; title=T2-BD_hiC layered
        variables -> /simulations/T1-BD_hiC/paddock/layered/Variables
        events Reporting Frequency -> /simulations/T1-BD_hiC/paddock/layered/Reporting Frequency
  simulation T3-BD_hiC -> /simulations/T2-BD_hiC
    area paddock -> /simulations/T2-BD_hiC/paddock
      Soil BulgR -> /simulations/T2-BD_hiC/paddock/BulgR
        Sample Initial nitrogen: NO3Units=kgha; NH4Units=kgha; SWUnits=Volumetric; OCUnits=Total; PHUnits=Water
          Thickness  NO3  NH4  SW
          100        4.5  4.5  0.348
          100        4.5  4.5  0.367
          100        4.5  4.5  0.39
          150        0    0    0.374
          150        0    0    0.386
          300        0    0    0.406
          300        0    0    0.391
          300        0    0    0.406
      folder Manager folder -> /simulations/T2-BD_hiC/paddock/Manager folder
        operations Operations Schedule
          21/6/2014  !'SurfaceOrganicMatter' tillage f_incorp = 0.8 (0-1), tillage_depth = 200. (mm) !Bianca commented out
          21/07/2014  'BulgR Nitrogen' reset
          21/07/2014  'BulgR Water' reset
          21/07/2014  !'BulgR Nitrogen' set no3 = 25 25 25 0 0 0
          21/07/2014  sugar sow plants = 10 (), cultivar = 'q117', sowing_depth = 150 (mm), row_spacing = 1000 (mm) !Bianca added row spacing
          21/07/2014  fertiliser apply amount = 29.5 (kg/ha), depth = 150 (mm), type = 'nh4_n' () !Bianca reduced N fert
          22/10/2014  fertiliser apply amount = 64.5 (kg/ha), depth = 50 (mm), type = 'urea_n' () !Bianca reduced N depth and increased N
          11/11/2015  sugar harvest
          25/11/2015  fertiliser apply amount = 112 (kg/ha), depth = 50 (mm), type = 'urea_n' () !Bianca increased N by 2 kg/ha
          25/11/2016  sugar harvest !Bianca changed date
      outputfile harvest -> /simulations/T2-BD_hiC/paddock/harvest: filename=T3-BD_hiC harvest.out; title=T3-BD_hiC harvest
        variables -> /simulations/T2-BD_hiC/paddock/harvest/Variables
        events Reporting Frequency -> /simulations/T2-BD_hiC/paddock/harvest/Reporting Frequency
      outputfile daily -> /simulations/T2-BD_hiC/paddock/daily: filename=T3-BD_hiC daily.out; title=T3-BD_hiC daily
        variables -> /simulations/T2-BD_hiC/paddock/daily/Variables
        events Reporting Frequency -> /simulations/T2-BD_hiC/paddock/daily/Reporting Frequency
      outputfile layered -> /simulations/T2-BD_hiC/paddock/layered: filename=T3-BD_hiC layered.out; title=T3-BD_hiC layered
        variables -> /simulations/T2-BD_hiC/paddock/layered/Variables
        events Reporting Frequency -> /simulations/T2-BD_hiC/paddock/layered/Reporting Frequency
  simulation T4-BD_hiC -> /simulations/T2-BD_hiC
    area paddock -> /simulations/T2-BD_hiC/paddock
      Soil BulgR -> /simulations/T2-BD_hiC/paddock/BulgR
        Sample Initial nitrogen: same as T3-BD_hiC.paddock.BulgR.Initial nitrogen
      folder Manager folder -> /simulations/T2-BD_hiC/paddock/Manager folder
        operations Operations Schedule
          21/6/2014  !'SurfaceOrganicMatter' tillage f_incorp = 0.8 (0-1), tillage_depth = 200. (mm) !Bianca commented out
          21/07/2014  'BulgR Nitrogen' reset
          21/07/2014  'BulgR Water' reset
          21/07/2014  !'BulgR Nitrogen' set no3 = 25 25 25 0 0 0
          21/07/2014  sugar sow plants = 10 (), cultivar = 'q117', sowing_depth = 150 (mm), row_spacing = 1000 (mm) !Bianca added row spacing
          21/07/2014  fertiliser apply amount = 29.5 (kg/ha), depth = 150 (mm), type = 'nh4_n' () !Bianca reduced N fert
          22/10/2014  fertiliser apply amount = 64.5 (kg/ha), depth = 50 (mm), type = 'urea_n' () !Bianca reduced N depth and increased N
          11/11/2015  sugar harvest
          25/11/2015  fertiliser apply amount = 110 (kg/ha), depth = 50 (mm), type = 'urea_n' () !This should be a blend of urea/crf !Bianca decreased by 2 kg/ha
          25/11/2016  sugar harvest !Bianca changed date
      outputfile harvest -> /simulations/T2-BD_hiC/paddock/harvest: filename=T4-BD_hiC harvest.out; title=T4-BD_hiC harvest
        variables -> /simulations/T2-BD_hiC/paddock/harvest/Variables
        events Reporting Frequency -> /simulations/T2-BD_hiC/paddock/harvest/Reporting Frequency
      outputfile daily -> /simulations/T2-BD_hiC/paddock/daily: filename=T4-BD_hiC daily.out; title=T4-BD_hiC daily
        variables -> /simulations/T2-BD_hiC/paddock/daily/Variables
        events Reporting Frequency -> /simulations/T2-BD_hiC/paddock/daily/Reporting Frequency
      outputfile layered -> /simulations/T2-BD_hiC/paddock/layered: filename=T4-BD_hiC layered.out; title=T4-BD_hiC layered
        variables -> /simulations/T2-BD_hiC/paddock/layered/Variables
        events Reporting Frequency -> /simulations/T2-BD_hiC/paddock/layered/Reporting Frequency
  simulation T5-BD_hiC -> /simulations/T2-BD_hiC
    area paddock -> /simulations/T2-BD_hiC/paddock
      Soil BulgR -> /simulations/T2-BD_hiC/paddock/BulgR
        Sample Initial nitrogen: same as T3-BD_hiC.paddock.BulgR.Initial nitrogen
      folder Manager folder -> /simulations/T2-BD_hiC/paddock/Manager folder
        operations Operations Schedule
          21/6/2014  !'SurfaceOrganicMatter' tillage f_incorp = 0.8 (0-1), tillage_depth = 200. (mm) !Bianca commented out
          21/07/2014  'BulgR Nitrogen' reset
          21/07/2014  'BulgR Water' reset
          21/07/2014  !'BulgR Nitrogen' set no3 = 25 25 25 0 0 0
          21/07/2014  sugar sow plants = 10 (), cultivar = 'q117', sowing_depth = 150 (mm), row_spacing = 1000 (mm) !Bianca added row spacing
          21/07/2014  fertiliser apply amount = 29.5 (kg/ha), depth = 150 (mm), type = 'nh4_n' () !Bianca reduced N fert
          22/10/2014  fertiliser apply amount = 37.5 (kg/ha), depth = 50 (mm), type = 'urea_n' () !Bianca reduced N depth and increased N
          11/11/2015  sugar harvest
          25/11/2015  fertiliser apply amount = 0 (kg/ha), depth = 50 (mm), type = 'urea_n' ()
          25/11/2016  sugar harvest !Bianca changed date
      outputfile harvest -> /simulations/T2-BD_hiC/paddock/harvest: filename=T5-BD_hiC harvest.out; title=T5-BD_hiC harvest
        variables -> /simulations/T2-BD_hiC/paddock/harvest/Variables
        events Reporting Frequency -> /simulations/T2-BD_hiC/paddock/harvest/Reporting Frequency
      outputfile daily -> /simulations/T2-BD_hiC/paddock/daily: filename=T5-BD_hiC daily.out; title=T5-BD_hiC daily
        variables -> /simulations/T2-BD_hiC/paddock/daily/Variables
        events Reporting Frequency -> /simulations/T2-BD_hiC/paddock/daily/Reporting Frequency
      outputfile layered -> /simulations/T2-BD_hiC/paddock/layered: filename=T5-BD_hiC layered.out; title=T5-BD_hiC layered
        variables -> /simulations/T2-BD_hiC/paddock/layered/Variables
        events Reporting Frequency -> /simulations/T2-BD_hiC/paddock/layered/Reporting Frequency
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